# Коэффициент усиления для n = 2
Given
0.82 == (1 - kB)/sqrt((1 - kB)^2 + 2*(1 + kB)*1^2 + 1^4)
Find(kB) → -0.752136752137
Koc := 9.3/0.380 → 24.4736842105
K := Koc*(1 - (-0.752)) → 42.8778947368
ωн := 2*π*180
ωв := 2*π*30*10^3
x1(ω) := ωн/ω
x2(ω) := ω/ωв
# Для 2-х каскадов:
kβ := -0.752
m21(ω) := (1 - kβ)/sqrt((1 - kβ)^2 + 2*(1 + kβ)*x1(ω)^2 + x1(ω)^4)
m22(ω) := (1 - kβ)/sqrt((1 - kβ)^2 + 2*(1 + kβ)*x2(ω)^2 + x2(ω)^4)
M2(ω) :=
    m21(ω) if ω ≤ 10^4
    m22(ω) if 10^4 < ω
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# Расчет оконечного каскада на БТ
# Рабочая точка
Uка := 12.3
Iка := 75*10^-3
Rн := 300
Eп := 2*Uка → 24.6
# По ряду Е24
Eпа := 36
Rк := (Eпа - Uка)/Iка → 316.0
Rб := 1/(1/1888.51 + 1/18737.72) → 1715.60055314
Rэ := 0.1*Rк → 31.6
# Статическая линия нагрузки
Rэ := 31.6
Iк == (Eп - Uка)/(Rк + Rэ)
# Динамическая линия нагрузки
y - y1 == k*(x - x1)
Rн*Rк/(Rн + Rк) → 153.896103896
k == tan(φ)
φ := acot(Rн*Rк/(Rн + Rк)*1/(2/(10*10^-3)))*180/π → 52.422418988
y == tan(acot(Rн*Rк/(Rн + Rк)))*(x - x1) + 0.0443
# С учетом эммитерного повторителя найдем входно сопротивление транзистора VT2
β := 467
Ns := (1 + β)*(Rэ + Rб)/(Rэ*(1 + β) + Rб) → 49.5437478166
Rвхvt2 := (β + 1)/2*Rн → 70200
φs := acot(Rвхvt2*Rк/(Rвхvt2 + Rк)*1/(2/(10*10^-3)))*180/π → 32.4465847245
# Входное сопротивление транзистора
h11оэ := 202.58
# Расчет элементов фиксации рабочей точки
# Обратный ток коллектора транзистора по справочнику
Ik0 := 10*10^-6/1
Ik0max := Ik0*(2.5^((50 - 20)/10) - 1) → 0.00014625
ΔIk0 := Ik0max - Ik0 → 0.00013625
ΔIk := 0.01*31*10^-3
# Температурный коэффициент нестабильности Ns
Ns := ΔIk/ΔIk0 → 2.2752293578
# Сопротивление R2 по Ns
R2 := (Rэ*(1 + β) - Ns*Rэ*(1 + β))/(Ns - (1 + β)) → 40.494113939
# Характеристики рабочей точки Р
Uбэр := 0.673529
Iбр := 0.000292
Iкр := 0.0443
Iэр := Iкр + Iбр → 0.044592
# Сопротивление R1
R1 := (Eпа - (Uбэр + Iэр*Rэ))/(Uбэр + Iэр*Rэ + Iбр*R2)*R2 → 655.755315753
R1/R2 → 16.1938428074
# Ток делителя:
Iд := Iбр + (Uбэр + Iэр*Rэ)/R2 → 0.051722590706
Rг := Rк
Iд/Iбр → 177.132159952
# Расчет емкостей C1, C2, Cэ
fн := 180
ωн := 2*π*fн
Rвх := 181.18
С1 := 1/(ωн*(Rг + Rвх)) → 1.77841853713e-6
Rк*Rн/(Rк + Rн) → 153.896103896
С2 := 1/(ωн*(Rк + Rн)) → 1.43538007839e-6
Сэ := 3*|β|/(ωн*h11оэ) → 0.00611489768848
# Предварительный расчет коэффициента усиления
Rб := R1*R2/(R1 + R2) → 38.1389619004
Ku := -β*Rк*Rн/(Rк + Rн)/((h11оэ/Rб + 1)*Rг + h11оэ) → -32.7117403034
# Рабочая точка на ПТ
655*10^-6/0.7 → 0.000935714285714
Uси := 2.612
Ic := 935*10^-6
E := 5.6
Rc := (E - Uси)/Ic → 3195.72192513
# По ВАХ напряжение затвор-исток:
Uзи := 2.627
# Сопротивление истока:
Rи := Uзи/Ic → 2809.62566845
# Параметры по стоковой ВАХ:
# Крутизна ПТ | Входное сопротивление ПТ
S := 0.00181
Rсидиф := 452650
Rнвх := 170.96
# Коэффициент усиления
Rc*Rнвх/(Rc + Rнвх) → 162.278656692
Ku := S*Rc*Rнвх/(Rc + Rнвх)/(1 + Rc*Rнвх/(Rc + Rнвх)/Rсидиф) → 0.293619103809
# Расчет делителя напряжения
Given
R2д := 220
Uвх := 36
Uвых := 5.6
Uвых == Uвх*R2д/(R1д + R2д)
Find(R1д) → 1194.28571429
# Найдем истинное значение
0.82 == sqrt(1/Mн) solve, Mн → 1.48720999405
